<?xml version="1.0"?>

<!--
  File:     J79-GE-10.xml
  Author:   Matthew A.
-->

<turbine_engine name="J79-GE-10">
  <milthrust> 11870.0 </milthrust>
  <maxthrust> 17859.0 </maxthrust>
  <bypassratio>     0.3 </bypassratio>
  <tsfc>            0.84 </tsfc>
  <atsfc>           1.97 </atsfc>
  <bleed>           0.03</bleed>
  <idlen1>         30.0 </idlen1>
  <idlen2>         65.0 </idlen2>
  <maxn1>         100.0 </maxn1>
  <maxn2>         100.0 </maxn2>
  <augmented>         1 </augmented>
  <augmethod>         1 </augmethod>
  <injected>          0 </injected>

  <function name="IdleThrust">
      <product>
          <value>0.44</value> <!-- 265 pounds -->
      <table>
    <independentVar lookup="row">velocities/mach</independentVar>
    <independentVar lookup="column">atmosphere/density-altitude</independentVar>
    <tableData>
         -10000     0     10000   20000   30000   40000   50000   90000
     0.0  0.0430  0.0488  0.0528  0.0694  0.0899  0.1183  0.1467  0
     0.2  0.0500  0.0501  0.0335  0.0544  0.0797  0.1049  0.1342  0
     0.4  0.0040  0.0047  0.0020  0.0272  0.0595  0.0891  0.1203  0
     0.6 -0.0804 -0.0804 -0.0560 -0.0237  0.0276  0.0718  0.1073  0
     0.8 -0.2129 -0.2129 -0.1498 -0.1025  0.0474  0.0868  0.0900  0
     1.0 -0.2839 -0.2839 -0.1104 -0.0469 -0.0270  0.0552  0.0800  0
    </tableData>
   </table>
</product>
  </function>

  <!-- Ram/Inlet recovery factor vs Mach (simple empirical table) -->
  <function name="thrust/ram-recovery">
    <description>Ram recovery factor to account for inlet losses at transonic/supersonic speeds</description>
    <table>
      <independentVar lookup="row">velocities/mach</independentVar>
      <tableData>
        0.0  1.000
        0.6  0.995
        0.8  0.985
        0.9  0.970
        1.0  0.940
        1.2  0.900
        1.6  0.820
        2.0  0.750
      </tableData>
    </table>
  </function>

  <function name="MilThrust">
    <product>
     <property>thrust/ram-recovery</property>
     <table>
      <independentVar lookup="row">velocities/mach</independentVar>
      <independentVar lookup="column">atmosphere/density-altitude</independentVar>
      <tableData>
          -10000       0   10000   20000   30000   40000   50000   60000   90000
      0.0  1.2600  1.0000  0.7400  0.5340  0.3720  0.2410  0.1490  0.0580  0
      0.2  1.1692  0.9326  0.6959  0.5052  0.3545  0.2306  0.1428  0.0399  0
      0.4  1.1465  0.9182  0.6899  0.5044  0.3559  0.2323  0.1446  0.0429  0
      0.6  1.1755  0.9466  0.7177  0.5295  0.3763  0.2469  0.1533  0.0468  0
      0.8  1.2503  1.0137  0.7772  0.5784  0.4144  0.2733  0.1690  0.0527  0
      1.0  1.3585  1.1114  0.8643  0.6460  0.4713  0.3126  0.1935  0.0625  0
      1.2  1.4713  1.2186  0.9660  0.7371  0.5400  0.3606  0.2229  0.0733  0
      1.4  1.5769  1.3256  1.0743  0.8359  0.6212  0.4194  0.2602  0.0890  0
     </tableData>
    </table>
   </product>
  </function>

  <function name="AugThrust">
    <product>
     <property>thrust/ram-recovery</property>
     <table>
      <independentVar lookup="row">velocities/mach</independentVar>
      <independentVar lookup="column">atmosphere/density-altitude</independentVar>
      <tableData>
           -10000       0   10000   20000   30000   40000   50000   60000
     0.0    1.1816  1.0000  0.8184  0.6627  0.5280  0.3756  0.2327  0
     0.2    1.1308  0.9599  0.7890  0.6406  0.5116  0.3645  0.2258  0
     0.4    1.1150  0.9474  0.7798  0.6340  0.5070  0.3615  0.2240  0
     0.6    1.1284  0.9589  0.7894  0.6420  0.5134  0.3661  0.2268  0
     0.8    1.1707  0.9942  0.8177  0.6647  0.5309  0.3784  0.2345  0
     1.0    1.2411  1.0529  0.8648  0.7017  0.5596  0.3983  0.2467  0
     1.2    1.3287  1.1254  0.9221  0.7462  0.5936  0.4219  0.2614  0
     1.4    1.4365  1.2149  0.9933  0.8021  0.6360  0.4509  0.2794  0
     1.6    1.5711  1.3260  1.0809  0.8700  0.6874  0.4860  0.3011  0
     1.8    1.7301  1.4579  1.1857  0.9512  0.7495  0.5289  0.3277  0
     2.0    1.8314  1.5700  1.3086  1.0474  0.8216  0.5786  0.3585  0
     2.2    1.9700  1.6900  1.4100  1.2400  0.9100  0.6359  0.3940  0
     2.4    2.0700  1.8000  1.5300  1.3400  1.0000  0.7200  0.4600  0
     2.6    2.2000  1.9200  1.6400  1.4400  1.1000  0.8000  0.5200  0
     </tableData>
    </table>
   </product>
  </function>

</turbine_engine>
