	<flight_control name="FCS: F-4"> <!-- Begin Flight Control System by Joshua Davidson (it0uchpods) --> <!-- Resource: ADA101648 -->

		<channel name="Gains">

			<switch name="hydromech/roll/KDA">
				<default value="8.08"/>
				<test value="4.0">
					hydromech/sas-roll eq 1
				</test>
			</switch>

			<switch name="hydromech/roll/L1">
				<default value="0"/>
				<test value="15.0">
					hydromech/sas-roll eq 1
				</test>
			</switch>

			<pure_gain name="hydromech/roll/L1n">
				<input>hydromech/roll/L1</input>
				<gain>-1.0</gain>
			</pure_gain>

			<switch name="hydromech/yaw/L2">
				<default value="0"/>
				<test value="30.0">
					hydromech/sas-yaw eq 1
				</test>
			</switch>

			<pure_gain name="hydromech/yaw/L2n">
				<input>hydromech/yaw/L2</input>
				<gain>-1.0</gain>
			</pure_gain>

			<switch name="hydromech/yaw/KXF">
				<default value="0"/>
				<test value="14.0">
					hydromech/sas-roll eq 1
				</test>
			</switch>

		</channel>

		<channel name="Hydromech: Roll">

			<summer name="hydromech/roll/aileron-sum">
				<input>/controls/flight/aileron</input>
				<input>/controls/flight/aileron-trim</input>
				<clipto>
					<min>-1.0</min>
					<max>1.0</max>
				</clipto>
			</summer>

			<pure_gain name="hydromech/roll/force">
				<input>hydromech/roll/aileron-sum</input>
				<gain>17.0</gain>
			</pure_gain>

			<deadband name="hydromech/roll/feel-limit">
				<input>hydromech/roll/force</input>
				<width>0.1</width>
				<clipto>
					<min>-17.0</min>
					<max>17.0</max>
				</clipto>
			</deadband>

			<pure_gain name="hydromech/roll/delta-stick">
				<input>hydromech/roll/feel-limit</input>
				<gain>0.2352941176470588</gain> <!-- 4 inches, guess -->
			</pure_gain>

			<switch name="hydromech/roll/p-rad_sec">
				<default value="0"/>
				<test logic="AND" value="velocities/p-rad_sec"> <!-- Disable SAS if switch off or stick force applied -->
					hydromech/sas-roll eq 1
					hydromech/roll/feel-limit gt -1
					hydromech/roll/feel-limit lt 1
				</test>
			</switch>

			<pure_gain name="hydromech/roll/p-rad-gain">
				<input>-hydromech/roll/p-rad_sec</input>
				<gain>15.2</gain>
			</pure_gain>

			<summer name="hydromech/roll/p-stick-suml">
				<input>hydromech/roll/delta-stick</input>
				<input>hydromech/roll/p-rad-gain</input>
				<clipto>
					<min>hydromech/roll/L1n</min>
					<max>hydromech/roll/L1</max>
				</clipto>
			</summer>

			<pure_gain name="hydromech/roll/a-stick-gain">
				<input>hydromech/roll/delta-stick</input>
				<gain>hydromech/roll/KDA</gain>
			</pure_gain>

			<summer name="hydromech/roll/delta-aileron">
				<input>hydromech/roll/p-stick-suml</input>
				<input>hydromech/roll/a-stick-gain</input>
				<clipto>
					<min>-30</min>
					<max>30</max>
				</clipto>
			</summer>

			<pure_gain name="hydromech/roll/delta-spoiler">
				<input>hydromech/roll/delta-stick</input>
				<gain>11.58</gain>
				<clipto>
					<min>-43</min>
					<max>43</max>
				</clipto>
			</pure_gain>

			<pure_gain name="hydromech/roll/delta-spoiler-inverted">
				<input>hydromech/roll/delta-spoiler</input>
				<gain>-1.0</gain>
			</pure_gain>

		</channel>

		<channel name="Hydromech: Pitch"> <!-- Can't find good schematics for this axis, so, much of this is a guess -->

			<pure_gain name="hydromech/pitch/force">
				<input>/controls/flight/elevator</input>
				<gain>17.0</gain>
			</pure_gain>

			<deadband name="hydromech/pitch/feel-limit">
				<input>hydromech/pitch/force</input>
				<width>0.1</width>
				<clipto>
					<min>-17.0</min>
					<max>17.0</max>
				</clipto>
			</deadband>

			<pure_gain name="hydromech/pitch/delta-stick">
				<input>hydromech/pitch/feel-limit</input>
				<gain>0.5941176470588235</gain> <!-- 10.1 inches, guess -->
			</pure_gain>

			<pure_gain name="hydromech/pitch/delta-offset"> <!-- I need schematics to make the correct trim system -->
				<input>/controls/flight/elevator-trim</input>
				<gain>5.05</gain>
			</pure_gain>

			<summer name="hydromech/pitch/delta-input-sum">
				<input>hydromech/pitch/delta-stick</input>
				<input>hydromech/pitch/delta-offset</input>
				<clipto>
					<min>-10.1</min>
					<max>10.1</max>
				</clipto>
			</summer>

			<pure_gain name="hydromech/pitch/delta-elevator-direct">
				<input>hydromech/pitch/delta-input-sum</input>
				<gain>2.08</gain> <!-- Half of 4.16, because it is positive and negative -->
			</pure_gain>

			<switch name="hydromech/pitch/q-rad_sec">
				<default value="0"/>
				<test logic="AND" value="velocities/q-rad_sec"> <!-- Disable SAS if switch off or stick force applied -->
					hydromech/sas-pitch eq 1
					hydromech/pitch/feel-limit gt -1
					hydromech/pitch/feel-limit lt 1
				</test>
			</switch>

			<pure_gain name="hydromech/pitch/q-final">
				<input>hydromech/pitch/q-rad_sec</input>
				<gain>8.59437</gain> <!-- Rad to Deg * 0.15 -->
			</pure_gain>

			<summer name="hydromech/pitch/delta-elevator">
				<input>hydromech/pitch/delta-elevator-direct</input>
				<input>hydromech/pitch/q-final</input>
			</summer>

		</channel>

		<channel name="Hydromech: Yaw">

			<summer name="hydromech/yaw/rudder-sum">
				<input>/controls/flight/rudder</input>
				<input>/controls/flight/rudder-trim</input>
				<clipto>
					<min>-1.0</min>
					<max>1.0</max>
				</clipto>
			</summer>

			<pure_gain name="hydromech/yaw/force">
				<input>hydromech/yaw/rudder-sum</input>
				<gain>120.0</gain>
			</pure_gain>

			<deadband name="hydromech/yaw/feel-limit">
				<input>hydromech/yaw/force</input>
				<width>0.1</width>
				<clipto>
					<min>-120.0</min>
					<max>120.0</max>
				</clipto>
			</deadband>

			<pure_gain name="hydromech/yaw/delta-pedal">
				<input>hydromech/yaw/feel-limit</input>
				<gain>0.075</gain> <!-- 9 inches, guess -->
			</pure_gain>

			<pure_gain name="hydromech/yaw/pedal-gain">
				<input>hydromech/yaw/delta-pedal</input>
				<gain>3.0</gain> <!-- Diagram says 10, but that doesn't make sense -->
			</pure_gain>

			<lag_filter name="hydromech/yaw/stick-lag">
				<input>hydromech/roll/delta-stick</input>
				<c1>hydromech/yaw/KXF</c1>
			</lag_filter>

			<fcs_function name="hydromech/yaw/stick-alpha">
				<function>
					<product>
						<property>hydromech/yaw/stick-lag</property>
						<table>
							<independentVar lookup="row">aero/alpha-deg</independentVar>
							<tableData>
								10  0
								20  1
							</tableData>
						</table>
						<property>hydromech/sas-yaw</property> <!-- Disable if switch off -->
					</product>
				</function>
			</fcs_function>

			<switch name="hydromech/yaw/r-rad_sec">
				<default value="0"/>
				<test logic="AND" value="velocities/r-rad_sec"> <!-- Disable SAS if switch off or stick force applied -->
					hydromech/sas-yaw eq 1
					hydromech/yaw/feel-limit gt -7
					hydromech/yaw/feel-limit lt 7
				</test>
			</switch>

			<lead_lag_filter name="hydromech/yaw/r-leadlag">
				<input>hydromech/yaw/r-rad_sec</input>
				<c1>-344.0</c1>
				<c2>0.0</c2>
				<c3>2.0</c3>
				<c4>1.0</c4>
			</lead_lag_filter>

			<pure_gain name="hydromech/yaw/ny-ft_sec2">
				<input>accelerations/Ny</input>
				<gain>32.174</gain>
			</pure_gain>

			<switch name="hydromech/yaw/ny-gain-gain">
				<default value="0"/>
				<test logic="AND" value="-0.963"> <!-- Disable SAS if switch off or stick force applied -->
					hydromech/sas-yaw eq 1
					hydromech/yaw/feel-limit gt -7
					hydromech/yaw/feel-limit lt 7
				</test>
			</switch>

			<pure_gain name="hydromech/yaw/ny-gain">
				<input>hydromech/yaw/ny-ft_sec2</input>
				<gain>hydromech/yaw/ny-gain-gain</gain>
				<clipto>
					<min>-5.0</min>
					<max>5.0</max>
				</clipto>
			</pure_gain>

			<summer name="hydromech/yaw/r-ny-sum">
				<input>hydromech/yaw/r-leadlag</input>
				<input>hydromech/yaw/ny-gain</input>
			</summer>

			<summer name="hydromech/yaw/sa-r-ny-sum">
				<input>-hydromech/yaw/stick-alpha</input>
				<input>-hydromech/yaw/r-ny-sum</input>
				<clipto>
					<min>hydromech/yaw/L2n</min>
					<max>hydromech/yaw/L2</max>
				</clipto>
			</summer>

			<switch name="hydromech/yaw/ari-max">
				<default value="10"/>
				<test value="15">
					hydromech/sas-yaw eq 1
				</test>
			</switch>

			<pure_gain name="hydromech/yaw/ari-min">
				<input>hydromech/yaw/ari-max</input>
				<gain>-1.0</gain>
			</pure_gain>

			<pure_gain name="hydromech/yaw/ari">
				<input>hydromech/roll/delta-aileron</input>
				<gain>1.0</gain>
				<clipto>
					<min>hydromech/yaw/ari-min</min>
					<max>hydromech/yaw/ari-max</max>
				</clipto>
			</pure_gain>

			<summer name="hydromech/yaw/delta-rudder">
				<input>hydromech/yaw/pedal-gain</input> <!-- Diagram says negative, but that doesn't make sense -->
				<input>-hydromech/yaw/sa-r-ny-sum</input>
				<input>hydromech/yaw/ari</input>
				<clipto>
					<min>-30</min>
					<max>30</max>
				</clipto>
			</summer>

		</channel>

		<channel name="Roll">

			<lag_filter name="fcs/aileron-left-deg">
				<input>hydromech/roll/delta-aileron</input>
				<c1>23.7</c1>
				<!-- Reference: ADA101648, page 20 -->
				<clipto>
					<min>-1</min>
					<max>30</max>
				</clipto>
				<output>/surface-positions/aileron-left</output>
			</lag_filter>

			<lag_filter name="fcs/aileron-right-deg">
				<input>hydromech/roll/delta-aileron</input>
				<c1>23.7</c1>
				<!-- Reference: ADA101648, page 20 -->
				<clipto>
					<min>-30</min>
					<max>1</max>
				</clipto>
				<output>/surface-positions/aileron-right</output>
			</lag_filter>

			<summer name="fcs/aileron-deg">
				<input>fcs/aileron-left-deg</input>
				<input>fcs/aileron-right-deg</input>
			</summer>

			<pure_gain name="fcs/spoiler-left-deg-a">
				<input>hydromech/roll/delta-spoiler-inverted</input>
				<gain>1.0</gain>
				<!-- Reference: ADA101648, page 20 -->
				<clipto>
					<min>0</min>
					<max>43</max>
				</clipto>
			</pure_gain>

			<lag_filter name="fcs/spoiler-left-deg">
				<input>fcs/spoiler-left-deg-a</input>
				<c1>25.1</c1>
				<output>/surface-positions/spoiler-left</output>
			</lag_filter>

			<pure_gain name="fcs/spoiler-right-deg-a">
				<input>hydromech/roll/delta-spoiler</input>
				<gain>1.0</gain>
				<!-- Reference: ADA101648, page 20 -->
				<clipto>
					<min>0</min>
					<max>43</max>
				</clipto>
			</pure_gain>

			<lag_filter name="fcs/spoiler-right-deg">
				<input>fcs/spoiler-right-deg-a</input>
				<c1>25.1</c1>
				<output>/surface-positions/spoiler-right</output>
			</lag_filter>

			<fcs_function name="fcs/spoiler-deg">
				<function>
					<product>
						<sum>
							<property>fcs/spoiler-left-deg</property>
							<property>fcs/spoiler-right-deg</property>
						</sum>
						<value>0.5</value>
					</product>
				</function>
			</fcs_function>

		</channel>

		<channel name="Pitch">

			<pure_gain name="fcs/elevator-deg-a">
				<input>hydromech/pitch/delta-elevator</input>
				<!-- Reference: ADA101648, page 20 -->
				<clipto>
					<min>-21</min>
					<max>9</max>
				</clipto>
			</pure_gain>

			<lag_filter name="fcs/elevator-deg">
				<input>fcs/elevator-deg-a</input>
				<c1>19.3</c1>
				<output>/surface-positions/elevator</output>
			</lag_filter>

		</channel>

		<channel name="Yaw">

			<pure_gain name="fcs/rudder-deg-a">
				<input>hydromech/yaw/delta-rudder</input>
				<gain>1.0</gain>
				<!-- Reference: ADA101648, page 20-->
				<range>
					<min>-30</min>
					<max>30</max>
				</range>
			</pure_gain>

			<lag_filter name="fcs/rudder-deg">
				<input>fcs/rudder-deg-a</input>
				<c1>19.1</c1>
				<output>/surface-positions/rudder</output>
			</lag_filter>

		</channel> <!-- End Flight Control System by Joshua Davidson (it0uchpods) -->

		<channel name="Flaps">

			<kinematic name="rubbish/flap-pos-deg">
				<input>fcs/flap-cmd-norm</input>
				<traverse>
					<setting>
						<position>0</position>
						<time>0</time>
					</setting>
					<setting>
						<position>30</position>
						<time>1.5</time>
					</setting>
				</traverse>
				<output>fcs/flap-pos-deg</output>
			</kinematic>

			<aerosurface_scale name="rubbish/flap-pos-norm">
				<input>fcs/flap-pos-deg</input>
					<domain>
						<min>0</min>
						<max>30</max>
					</domain>
					<range>
						<min>0</min>
						<max>1</max>
					</range>
				<output>fcs/flap-pos-norm</output>
			</aerosurface_scale>

		</channel>

		<channel name="Landing Gear">

			<kinematic name="rubbish/gear-pos-norm">
				<input>gear/gear-cmd-norm</input>
				<traverse>
					<setting>
						<position>0</position>
						<time>0</time>
					</setting>
					<setting>
						<position>1</position>
						<time>5</time>
					</setting>
				</traverse>
				<output>gear/gear-pos-norm</output>
			</kinematic>

		</channel>

		<channel name="Speedbrake">

			<kinematic name="rubbish/speedbrake-pos-nrom">
				<input>fcs/speedbrake-cmd-norm</input>
				<traverse>
					<setting>
						<position>0</position>
						<time>0</time>
					</setting>
					<setting>
						<position>30</position>
						<time>3</time>
					</setting>
				</traverse>
				<output>fcs/speedbrake-pos-norm</output>
			</kinematic>

		</channel>

		<channel name="Brakes">

			<pure_gain name="rubbish/left-brake-cmd-norm">
				<input>/controls/gear/brake-left</input>
				<output>fcs/left-brake-cmd-norm</output>
			</pure_gain>

			<pure_gain name="rubbish/right-brake-cmd-norm">
				<input>/controls/gear/brake-right</input>
				<output>fcs/right-brake-cmd-norm</output>
			</pure_gain>

		</channel>

	</flight_control>
